Simulations: Version=150
  DataStore
  Simulation Operations
    Weather: FileName=basic_wth_3.csv
    Clock: Start=1989-01-01; End=2100-12-31
    Summary
    SoilArbitrator
    Zone Field: Area=1; Slope=0; AspectAngle=0; Altitude=288
      SurfaceOrganicMatter: InitialResidueName=soybean; InitialResidueType=soybean; InitialResidueMass=1000; InitialStandingFraction=0; InitialCPR=0; InitialCNR=27
      Fertiliser
      Irrigation
      Plant Maize
      Plant Soybean
      Plant Wheat
      Report: EventNames=[Clock].DoReport
        VariableNames:
          [Clock].Today
          //==== Crop Variables (annual)
          [Maize].Grain.Wt   as MaizeYield_gm2
          [Soybean].Grain.Wt as SoyYield_gm2
          [Wheat].Grain.Wt   as WheatYield_gm2
          [Maize].Grain.Wt * 10   as MaizeYield_kgha
          [Soybean].Grain.Wt * 10 as SoyYield_kgha
          [Wheat].Grain.Wt * 10   as WheatYield_kgha
          [Maize].Grain.Wt * 0.159/0.85   		as Corn_buac
          [Soybean].Grain.Wt * 0.149/0.87 		as Soy_buac
          [Wheat].Grain.Wt * 4046.86/(60*453.592) as Wheat_buac
          //[Maize].AboveGround.Wt as MaizeBiomass
          //[Soybean].AboveGround.Wt as SoyBiomass
          //[Wheat].AboveGround.Wt as WheatBiomass
          //[Maize].LAI
          //[Soybean].LAI
          //==== Soil Variables
          [Soil].Physical.BD as BulkDensity_gcc
          [UnitConversions].Script.OC_pct[1] as PctSOM_C_20cm
          sum([Soil].Nutrient.TotalC) as TotalC_wp_kgha
          [Soil].Nutrient.TotalC[1] as TotalC_20cm_kgha
          ([Soil].Nutrient.TotalC[1] + ([Soil].Nutrient.TotalC[2]*0.25)) as TotalC_25cm_kgha
          [Soil].Nutrient.TotalC[2] as TotalC_40cm_kgha
          sum([Soil].Nutrient.TotalC)/1000 as TotalC_wp_Mgha
          [Soil].Nutrient.TotalC[1]/1000 as TotalC_20cm_Mgha
          ([Soil].Nutrient.TotalC[1] + ([Soil].Nutrient.TotalC[2]*0.25))/1000 as TotalC_25cm_Mgha
          [Soil].Nutrient.TotalC[2]/1000 as TotalC_40cm_Mgha
          [Soil].Nutrient.Humic.C[1] + [Soil].Nutrient.Microbial.C[1] + [Soil].Nutrient.Inert.C[1] as TotalSOC_20cm_kgha
          ([Soil].Nutrient.Humic.C[1] + [Soil].Nutrient.Microbial.C[1] + [Soil].Nutrient.Inert.C[1])/1000 as TotalSOC_20cm_Mgha
          [Soil].Nutrient.Humic.C[1] + [Soil].Nutrient.Microbial.C[1] + [Soil].Nutrient.Inert.C[1] + (([Soil].Nutrient.Humic.C[2] + [Soil].Nutrient.Microbial.C[2] + [Soil].Nutrient.Inert.C[2]) * 0.25) as TotalSOC_25cm_kgha
          ([Soil].Nutrient.Humic.C[1] + [Soil].Nutrient.Microbial.C[1] + [Soil].Nutrient.Inert.C[1] + (([Soil].Nutrient.Humic.C[2] + [Soil].Nutrient.Microbial.C[2] + [Soil].Nutrient.Inert.C[2]) * 0.25))/1000 as TotalSOC_25cm_Mgha
          sum([Soil].Nutrient.N2Oatm) as N2OEmissions_kgha
          ([Soil].Nutrient.N2Oatm[1] + ([Soil].Nutrient.N2Oatm[2]*0.25)) as N2O_25cm_kgha
          sum([Soil].Nutrient.N2Oatm[1:5]) as N2O_100cm_kgha
          [Soil].Nutrient.N2Oatm as N2O_bylayer_kgha
          [Soil].SoilWater.SWmm[1] as VolH2O_20cm_SWmm
          [Soil].SoilWater.SW[1] as VolH2O_20cm
          [Soil].Temperature.Value[1] as SoilTemp_20cm_C
          [Soil].Temperature.Value[2] as SoilTemp_40cm_C
          [Soil].Temperature.Value[3] as SoilTemp_60cm_C
          [Soil].Temperature.Value[4] as SoilTemp_80cm_C
          [Soil].Temperature.Value[5] as SoilTemp_100cm_C
          [Soil].Temperature.Value[6] as SoilTemp_120cm_C
          [Soil].Temperature.Value[7] as SoilTemp_140cm_C
          [Soil].Temperature.Value[8] as SoilTemp_160cm_C
          [Soil].Temperature.Value[9] as SoilTemp_180cm_C
          [Soil].Temperature.Value[10] as SoilTemp_200cm_C
          [Soil].Nutrient.Catm  as CO2_bylayer_kgCha // (units kg C per ha per day)
          sum([Soil].Nutrient.Catm) as TotalCO2_kgCha
          //==== Unused
          //sum([UnitConversions].Script.OC_pct[1:2]) * 0.25 + [UnitConversions].Script.OC_pct[3] * 0.5 as OC_40cm
          //[SurfaceOrganicMatter].Wt
          //[SurfaceOrganicMatter].Cover
          //sum([Soil].Nutrient.NO3.kgha) as NO3
          //===== Summed Annually
          //um of sum([Soil].Nutrient.DenitrifiedN) from [Clock].StartOfYear to [Clock].EndOfYear as AnnualDenitrif
          sum of sum([Soil].Nutrient.N2Oatm) from [Clock].StartOfYear to [Clock].EndOfYear as AnnualN2O
          //sum of [Fertiliser].NitrogenApplied from [Clock].StartOfYear to [Clock].EndOfYear as AnnualNfertilizer
          //sum of sum([Soil].Nutrient.MineralisedNSurfaceResidue) from [Clock].StartOfYear to [Clock].EndOfYear as AnnualResidueMineral
          //sum of sum([Soil].Nutrient.MineralisedN) from [Clock].StartOfYear to [Clock].EndOfYear as AnnualSoilMineral
          //sum of sum([Soil].Nutrient.MineralisedN + [Soil].Nutrient.MineralisedNSurfaceResidue) from [Clock].StartOfYear to [Clock].EndOfYear as AnnualSoilNetMineral
          //sum of [Soil].SoilWater.LeachNO3 from [Clock].StartOfYear to [Clock].EndOfYear as AnnualNleaching
          //sum of (-1 * [Maize].Root.NUptake) from [Clock].StartOfYear to [Clock].EndOfYear as AnnualNUptake
          //===== Daily Values
          //sum([Soil].Nutrient.NO3.kgha) as NO3
          //sum([Soil].Nutrient.NH4.kgha) as NH4
          //[SurfaceOrganicMatter].N  as SurfaceN
          //sum([Soil].Nutrient.Microbial.N) as MicrobialN
          //sum([Soil].Nutrient.FOM.N) as FreshOrganicMatterN
          //sum([Soil].Nutrient.Humic.N) as HumicN
          //[Soil].SoilWater.LeachNO3 as NO3Leaching
          //sum([Soil].Nutrient.N2Oatm) as N2OEmissions
          //sum([Soil].Nutrient.DenitrifiedN) as Denitrification
          //sum([Soil].Nutrient.MineralisedN + [Soil].Nutrient.MineralisedNSurfaceResidue) as TotalMineralization
          //sum([Soil].Nutrient.MineralisedN) as SoilMineralization
          //sum([Soil].Nutrient.MineralisedNSurfaceResidue) as SurfaceMineralization
          //diff of sum([Soil].Nutrient.NO3.kgha + [Soil].Nutrient.NH4.kgha + [Soil].Nutrient.Urea.kgha) from [Clock].StartOfSimulation to [Clock].EndOfDay as DeltaSoilMineralN
          //diff of [SurfaceOrganicMatter].N from [Clock].StartOfSimulation to [Clock].EndOfDay as DeltaSurfaceOMN
          //diff of sum([Soil].Nutrient.Humic.N + [Soil].Nutrient.Microbial.N + [Soil].Nutrient.FOM.N) from [Clock].StartOfSimulation to [Clock].EndOfDay as DeltaSoilOMN
          //-1 * [Maize].Root.NUptake as CropNUptake
          //[Maize].Grain.Wt as CropYield
          //[Maize].AboveGround.Wt as CropBiomass
          //[Maize].LAI as LAI
          //===== Daily Values for C pools (units Kg C per ha)
          //sum([Soil].Nutrient.FOMCarbohydrate.C)
          //sum([Soil].Nutrient.FOMCellulose.C)
          //sum([Soil].Nutrient.FOMLignin.C)
          //sum([Soil].Nutrient.Humic.C)
          //sum([Soil].Nutrient.Microbial.C)
          //sum([Soil].Nutrient.Inert.C)
          //[SurfaceOrganicMatter].C
          [Soil].Nutrient.FOMCarbohydrate.C[1] as FOMCarb_20cm_kgha
          [Soil].Nutrient.FOMCellulose.C[1] as FOMCell_20cm_kgha
          [Soil].Nutrient.FOMLignin.C[1] as FOMLign_20cm_kgha
          [Soil].Nutrient.FOMCarbohydrate.C[1] + ([Soil].Nutrient.FOMCarbohydrate.C[2] * 0.25) as FOMCarb_25cm_kgha
          [Soil].Nutrient.FOMCellulose.C[1] + ([Soil].Nutrient.FOMCellulose.C[2] * 0.25) as FOMCell_25cm_kgha
          [Soil].Nutrient.FOMLignin.C[1] + ([Soil].Nutrient.FOMLignin.C[2] * 0.25) as FOMLign_25cm_kgha
          [Soil].Nutrient.FOMCarbohydrate.Decomposition.Catm[1] as FOMCarb_CO2_20cm_kgha
          [Soil].Nutrient.FOMCellulose.Decomposition.Catm[1] as FOMCell_CO2_20cm_kgha
          [Soil].Nutrient.FOMLignin.Decomposition.Catm[1] as FOMLign_CO2_20cm_kgha
          [Soil].Nutrient.FOMCarbohydrate.Decomposition.Catm[1] + ([Soil].Nutrient.FOMCarbohydrate.Decomposition.Catm[2] * 0.25) as FOMCarb_CO2_25cm_kgha
          [Soil].Nutrient.FOMCellulose.Decomposition.Catm[1] + ([Soil].Nutrient.FOMCellulose.Decomposition.Catm[2] * 0.25) as FOMCell_CO2_25cm_kgha
          [Soil].Nutrient.FOMLignin.Decomposition.Catm[1] + ([Soil].Nutrient.FOMLignin.Decomposition.Catm[2] * 0.25) as FOMLign_CO2_25cm_kgha
          //[Soil].Nutrient.FOM.C[1]
          //[Soil].Nutrient.Humic.C[1]
          //[Soil].Nutrient.Microbial.C[1]
          //[Soil].Nutrient.Inert.C[1]
          //[SurfaceOrganicMatter].C
          //[Soil].Nutrient.FOMCarbohydrate.C[1] + [Soil].Nutrient.FOMCellulose.C[1] + [Soil].Nutrient.FOMLignin.C[1] as FOMC_20cm_kgha
          //([Soil].Nutrient.FOMCarbohydrate.C[1] + [Soil].Nutrient.FOMCellulose.C[1] + [Soil].Nutrient.FOMLignin.C[1])/10 as FOMC_20cm_gm2
          //([Soil].Nutrient.FOMCarbohydrate.C[1] + [Soil].Nutrient.FOMCellulose.C[1] + [Soil].Nutrient.FOMLignin.C[1])/1000 as FOMC_20cm_Mgha
          //[Soil].Nutrient.FOMCarbohydrate.C[1] + [Soil].Nutrient.FOMCellulose.C[1] + [Soil].Nutrient.FOMLignin.C[1] + (([Soil].Nutrient.FOMCarbohydrate.C[2] + [Soil].Nutrient.FOMCellulose.C[2] + [Soil].Nutrient.FOMLignin.C[2]) * 0.25) as FOMC_25cm_kgha
          //([Soil].Nutrient.FOMCarbohydrate.C[1] + [Soil].Nutrient.FOMCellulose.C[1] + [Soil].Nutrient.FOMLignin.C[1] + (([Soil].Nutrient.FOMCarbohydrate.C[2] + [Soil].Nutrient.FOMCellulose.C[2] + [Soil].Nutrient.FOMLignin.C[2]) * 0.25))/10 as FOMC_25cm_gm2
          //([Soil].Nutrient.FOMCarbohydrate.C[1] + [Soil].Nutrient.FOMCellulose.C[1] + [Soil].Nutrient.FOMLignin.C[1] + (([Soil].Nutrient.FOMCarbohydrate.C[2] + [Soil].Nutrient.FOMCellulose.C[2] + [Soil].Nutrient.FOMLignin.C[2]) * 0.25))/1000 as FOMC_25cm_Mgha
          //[Soil].Nutrient.FOMCarbohydrate.Decomposition.Catm[1] + [Soil].Nutrient.FOMCellulose.Decomposition.Catm[1] + [Soil].Nutrient.FOMLignin.Decomposition.Catm[1] as CO2_20cm_kgha
          //[Soil].Nutrient.FOMCarbohydrate.Decomposition.Catm[1] + [Soil].Nutrient.FOMCellulose.Decomposition.Catm[1] + [Soil].Nutrient.FOMLignin.Decomposition.Catm[1] + (([Soil].Nutrient.FOMCarbohydrate.Decomposition.Catm[2] + [Soil].Nutrient.FOMCellulose.Decomposition.Catm[2] + [Soil].Nutrient.FOMLignin.Decomposition.Catm[2]) * 0.25) as CO2_25cm_kgha
          //===== Daily Values for C fluxes (units kg C per ha per day)
          //sum([Soil].Nutrient.FOMCarbohydrate.Decomposition.Catm)
          //sum([Soil].Nutrient.FOMCellulose.Decomposition.Catm)
          //sum([Soil].Nutrient.FOMLignin.Decomposition.Catm)
          //sum([Soil].Nutrient.Microbial.Decomposition.Catm)
          //sum([Soil].Nutrient.Humic.Decomposition.Catm)
          //[Soil].Nutrient.SurfaceResidue.Decomposition.Catm[1]
          //sum([Soil].Nutrient.Catm)
          //===== Long term SOM whole profile
          //sum([Soil].Nutrient.TotalC)
          //sum([Soil].Nutrient.Humic.C) + sum([Soil].Nutrient.Microbial.C) + sum([Soil].Nutrient.Inert.C) as TotalSOM_C
          //sum([Soil].Nutrient.FOMCarbohydrate.C) + sum([Soil].Nutrient.FOMCellulose.C) + sum([Soil].Nutrient.FOMLignin.C) as TotalFOM_C
          //===== Long term SOM by layer and %
          //[Soil].Nutrient.TotalC
          //[UnitConversions].Script.OC_pct
      MicroClimate: a_interception=0; b_interception=1; c_interception=0; d_interception=0; SoilHeatFluxFraction=0.38; MinimumHeightDiffForNewLayer=0; NightInterceptionFraction=0.5; ReferenceHeight=2
      Operations
        1989-08-07  [SurfaceOrganicMatter].Incorporate(fraction: 0.5, depth: 30)
        1989-08-12  [WhiteClover].Sow(cultivar: Kopu, population: 181, depth: 50, rowSpacing: 178)
        1990-01-31  [WhiteClover].Harvest
        1990-01-31  [WhiteClover].EndCrop
        1990-01-31  [SurfaceOrganicMatter].Incorporate(fraction: 0, depth: 0)
        1990-04-30  [Fertiliser].Apply(Amount: 28, Type: NO3N)
        1990-04-30  [Maize].Sow(cultivar: B_100, population: 6, depth: 50, rowSpacing: 762)
        1990-05-07  [SurfaceOrganicMatter].Incorporate(fraction: 0.5, depth: 30)
        1990-11-12  [Maize].Harvest
        1990-11-12  [Maize].EndCrop
        1991-05-21  [Soybean].Sow(cultivar: Generic_MG2, population: 35, depth: 50, rowSpacing: 762)
        1991-10-01  [Soybean].Harvest
        1991-10-01  [Soybean].EndCrop
        1991-10-09  [Wheat].Sow(cultivar: Yecora, population: 445, depth: 50, rowSpacing: 178)
        1992-07-21  [Wheat].Harvest
        1992-07-21  [Wheat].EndCrop
        1992-08-26  [WhiteClover].Sow(cultivar: Kopu, population: 148, depth: 50, rowSpacing: 178)
        1993-01-31  [WhiteClover].Harvest
        1993-01-31  [WhiteClover].EndCrop
        1993-01-31  [SurfaceOrganicMatter].Incorporate(fraction: 0, depth: 0)
        1993-05-14  [Fertiliser].Apply(Amount: 60, Type: NO3N)
        1993-05-14  [Maize].Sow(cultivar: B_100, population: 6, depth: 50, rowSpacing: 762)
        1993-05-20  [SurfaceOrganicMatter].Incorporate(fraction: 0.5, depth: 30)
        1993-07-07  [SurfaceOrganicMatter].Incorporate(fraction: 0.5, depth: 30)
        1993-11-02  [Maize].Harvest
        1993-11-02  [Maize].EndCrop
        1993-11-03  [WhiteClover].Sow(cultivar: Kopu, population: 148, depth: 50, rowSpacing: 178)
        1994-04-07  [WhiteClover].Harvest
        1994-04-07  [WhiteClover].EndCrop
        1994-04-07  [SurfaceOrganicMatter].Incorporate(fraction: 0, depth: 0)
        1994-04-18  [SurfaceOrganicMatter].Incorporate(fraction: 0.5, depth: 30)
        1994-05-06  [SurfaceOrganicMatter].Incorporate(fraction: 0.9, depth: 110)
        1994-05-12  [SurfaceOrganicMatter].Incorporate(fraction: 0.1, depth: 5)
        1994-05-12  [SurfaceOrganicMatter].Incorporate(fraction: 0.1, depth: 5)
        1994-05-16  [Soybean].Sow(cultivar: Generic_MG2, population: 35, depth: 50, rowSpacing: 762)
        1994-06-01  [SurfaceOrganicMatter].Incorporate(fraction: 0.5, depth: 30)
        1994-06-09  [Fertiliser].Apply(Amount: 2, Type: NO3N)
        1994-10-15  [Soybean].Harvest
        1994-10-15  [Soybean].EndCrop
        1994-10-17  [SurfaceOrganicMatter].Incorporate(fraction: 0.9, depth: 110)
        1994-10-18  [Wheat].Sow(cultivar: Yecora, population: 445, depth: 50, rowSpacing: 178)
        1994-10-18  [SurfaceOrganicMatter].Incorporate(fraction: 0.1, depth: 5)
        1995-04-20  [Fertiliser].Apply(Amount: 34, Type: NO3N)
        1995-07-26  [Wheat].Harvest
        1995-07-26  [Wheat].EndCrop
        1995-08-09  [RedClover].Sow(cultivar: Colenso, population: 815, depth: 50, rowSpacing: 178)
        1996-01-31  [RedClover].Harvest
        1996-01-31  [RedClover].EndCrop
        1996-01-31  [SurfaceOrganicMatter].Incorporate(fraction: 0, depth: 0)
        1996-04-28  [SurfaceOrganicMatter].Incorporate(fraction: 0.9, depth: 110)
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        1996-05-14  [Fertiliser].Apply(Amount: 27, Type: NO3N)
        1996-10-29  [RedClover].Sow(cultivar: Colenso, population: 519, depth: 50, rowSpacing: 178)
        1997-04-10  [Fertiliser].Apply(Amount: 20, Type: RockP)
        1997-05-23  [Soybean].Sow(cultivar: Generic_MG2, population: 47, depth: 50, rowSpacing: 762)
        1999-04-20  [Fertiliser].Apply(Amount: 0, Type: CalciteCA)
        1999-10-14  [Oats].Sow(cultivar: Wintaroo, population: 374, depth: 50, rowSpacing: 178)
        2000-01-31  [Oats].Harvest
        2000-01-31  [Oats].EndCrop
        2000-06-07  [Soybean].Sow(cultivar: Generic_MG2, population: 52, depth: 50, rowSpacing: 762)
        2000-11-01  [Wheat].Sow(cultivar: Yecora, population: 466, depth: 50, rowSpacing: 178)
        2001-04-05  [Fertiliser].Apply(Amount: 47, Type: NO3N)
        2002-05-15  [Fertiliser].Apply(Amount: 11, Type: RockP)
        2002-05-15  [Maize].Sow(cultivar: B_100, population: 7, depth: 50, rowSpacing: 762)
        2003-05-28  [Soybean].Sow(cultivar: Generic_MG2, population: 44, depth: 50, rowSpacing: 762)
        2003-10-13  [Wheat].Sow(cultivar: Yecora, population: 494, depth: 50, rowSpacing: 178)
        2004-04-16  [Fertiliser].Apply(Amount: 54, Type: NO3N)
        2005-05-07  [Fertiliser].Apply(Amount: 33, Type: NO3N)
        2005-05-07  [Fertiliser].Apply(Amount: 13, Type: RockP)
        2008-11-11  [Oats].Sow(cultivar: Wintaroo, population: 448, depth: 50, rowSpacing: 178)
        2009-06-23  [Fertiliser].Apply(Amount: 1, Type: NO3N)
        2009-11-14  [Wheat].Sow(cultivar: Yecora, population: 498, depth: 50, rowSpacing: 178)
        2010-04-21  [Fertiliser].Apply(Amount: 50, Type: NO3N)
        2010-05-03  [Fertiliser].Apply(Amount: 87, Type: NO3N)
        2011-07-05  [Fertiliser].Apply(Amount: 124, Type: NO3N)
        2011-11-19  [Oats].Sow(cultivar: Wintaroo, population: 672, depth: 50, rowSpacing: 178)
        2012-04-23  [Fertiliser].Apply(Amount: 8, Type: NO3N)
        2012-04-23  [Fertiliser].Apply(Amount: 17, Type: RockP)
        2013-08-16  [RedClover].Sow(cultivar: Colenso, population: 714, depth: 50, rowSpacing: 178)
        2014-11-07  [Oats].Sow(cultivar: Wintaroo, population: 729, depth: 50, rowSpacing: 178)
        2015-04-14  [Fertiliser].Apply(Amount: 10, Type: NO3N)
        2015-04-14  [Fertiliser].Apply(Amount: 26, Type: RockP)
        2016-04-16  [Fertiliser].Apply(Amount: 20, Type: NO3N)
        2016-04-16  [Fertiliser].Apply(Amount: 52, Type: RockP)
        2016-04-27  [Fertiliser].Apply(Amount: 9, Type: NO3N)
        2016-04-27  [Fertiliser].Apply(Amount: 17, Type: NO3N)
        2016-04-27  [Fertiliser].Apply(Amount: 8, Type: RockP)
        2017-05-19  [Maize].Sow(cultivar: B_100, population: 8, depth: 50, rowSpacing: 762)
        2017-11-08  [Oats].Sow(cultivar: Wintaroo, population: 663, depth: 50, rowSpacing: 178)
        2018-10-19  [Wheat].Sow(cultivar: Yecora, population: 485, depth: 50, rowSpacing: 178)
        2019-04-08  [Fertiliser].Apply(Amount: 23, Type: NO3N)
        2019-04-08  [Fertiliser].Apply(Amount: 58, Type: RockP)
        2019-05-06  [Fertiliser].Apply(Amount: 30, Type: NO3N)
        2019-08-22  [RedClover].Sow(cultivar: Colenso, population: 747, depth: 50, rowSpacing: 178)
        2020-05-26  [Fertiliser].Apply(Amount: 34, Type: RockP)
        2021-05-10  [Fertiliser].Apply(Amount: 27, Type: RockP)
        2021-11-07  [Wheat].Sow(cultivar: Yecora, population: 489, depth: 50, rowSpacing: 178)
      Manager UnitConversions
```csharp
using System;
using System.Linq;
using Models.Core;
using Models.Interfaces;
using Models.PMF;
using Models.Soils;
using Models.Soils.Nutrients;
using APSIM.Shared.Utilities;

namespace Models
{
    [Serializable]
    public class Script : Model
    {
    	// Has BD and Thickness, which we need.
    	[Link] IPhysical Physical;
    	[Link] Nutrient Nutrient;
    	
    	[Description("kg/ha to parts per million converison factor")]
    	public double[] kgha2ppm
    	{
    		get => 
    			Physical.BD
    				// Combine bd and thickness.
    				.Zip(Physical.Thickness,
    				     // Produce a single conversion factor.
    				     (bd, th) => 100 / (bd * th))
    				.ToArray();
    	}
    	
    	[Description("Total organic carbon (percent)")]
    	public double[] OC_pct
    	{
    		get 
    		{
    			// Converts from a PPM value to percent value (0-100)
    			var ppm2pct = 100 / 1000000.0;
    			var res =
    				// Organic C is the sum of all pools (per layer, in kg/ha)
    				// Does not include surface residue. Does include Inert and FOM pools.
    				Nutrient.Organic.C
    					// Combines the above values with the kgha->ppm conversion factor...
    					.Zip(kgha2ppm,
    					     // ... and produces a single value in the end.
    					     (oc, factor) => oc * factor * ppm2pct)
    					// Returns an array so the Report can work with it easily.
    					.ToArray();

    			return res;
    		}
    	}
    }
}
```
      Soil Kalamazoo:187069: SoilType=Kalamazoo:187069; State=MI; Country=USA; ApsoilNumber=0; Latitude=42.41; Longitude=-85.372
        DataSource=SSURGO (https://sdmdataaccess.nrcs.usda.gov/) through R package soilDB, R package apsimx function ssurgo2sp. Timestamp 2022-12-09 14:30:17
        Comments=cokey = 22386986 - acres percent = 95 - component percent = 95 - taxonomic classification name = Fine-loamy, mixed, active, mesic Typic Hapludalfs - drainage class = Well drained - elevation = 275 - slope = 3 - geomdesc = Head Slope, Interfluve, Nose Slope, Side Slope
        Physical
          Thickness  ParticleSizeClay  ParticleSizeSand  ParticleSizeSilt  BD    AirDry      LL15        DUL    SAT    KS
          200        19                43                38                1.11  0.03376907  0.06753815  0.27   0.58   86.4
          200        19                43                38                1.2   0.03376907  0.06753815  0.27   0.54   86.4
          200        19                43                38                1.6   0.03376907  0.06753815  0.27   0.393  86.4
          200        23                51                26                1.55  0.13822352  0.13822352  0.246  0.393  47.52
          200        12                71                17                1.55  0.06916603  0.06916603  0.142  0.385  475.2
          200        5                 87                8                 1.55  0.02266792  0.02266792  0.069  0.406  4752
          200        5                 87                8                 1.55  0.02266792  0.02266792  0.069  0.406  4752
          200        5                 87                8                 1.55  0.02266792  0.02266792  0.069  0.406  4752
          200        1                 95                4                 1.55  0.02266792  0.02266792  0.033  0.414  4752
          200        1                 95                4                 1.55  0.02266792  0.02266792  0.033  0.414  4752
          SoilCrop MaizeSoil
            LL=[0.06753815, 0.06753815, 0.06753815, 0.13822352, 0.06916603, 0.02266792, 0.02266792, 0.02266792, 0.02266792, 0.02266792]
            KL=[0.06, 0.06, 0.06, 0.06, 0.06, 0.06, 0.06, 0.06, 0.06, 0.06]
            XF=[1, 1, 1, 1, 1, 1, 1, 1, 1, 1]
            LL source: Estimated based on local knowledge
          SoilCrop SoybeanSoil: same as Operations.Field.Kalamazoo:187069.Physical.MaizeSoil
          SoilCrop WheatSoil
            LL=[0.06753815, 0.06753815, 0.06753815, 0.13822352, 0.06916603, 0.02266792, 0.02266792, 0.02266792, 0.02266792, 0.02266792]
            KL=[0.06, 0.06, 0.06, 0.06, 0.06, 0.06, 0.06, 0.06, 0.06, 0.06]
            XF=[1, 1, 1, 1, 1, 1, 1, 1, 1, 1]
          SoilCrop WhiteCloverSoil
            LL=[0.06753815, 0.06753815, 0.06753815, 0.13822352, 0.06916603, 0.02266792, 0.02266792, 0.02266792, 0.02266792, 0.02266792]
            KL=[0.06, 0.06, 0.06, 0.06, 0.06, 0.06, 0.06, 0.06, 0.06, 0.06]
            XF=[1, 1, 1, 1, 1, 1, 1, 1, 1, 1]
          SoilCrop OatsSoil
            LL=[0.06753815, 0.06753815, 0.06753815, 0.13822352, 0.06916603, 0.02266792, 0.02266792, 0.02266792, 0.02266792, 0.02266792]
            KL=[0.06, 0.06, 0.06, 0.06, 0.06, 0.06, 0.06, 0.06, 0.06, 0.06]
            XF=[1, 1, 1, 1, 1, 1, 1, 1, 1, 1]
          SoilCrop RedCloverSoil
            LL=[0.06753815, 0.06753815, 0.06753815, 0.13822352, 0.06916603, 0.02266792, 0.02266792, 0.02266792, 0.02266792, 0.02266792]
            KL=[0.06, 0.06, 0.06, 0.06, 0.06, 0.06, 0.06, 0.06, 0.06, 0.06]
            XF=[1, 1, 1, 1, 1, 1, 1, 1, 1, 1]
        WaterBalance SoilWater: SummerDate=1-jun; SummerU=8.55; SummerCona=3.775; WinterDate=1-nov; WinterU=8.55; WinterCona=3.775; DiffusConst=40; DiffusSlope=16; Salb=0.1; CN2Bare=76; CNRed=20; CNCov=0.8; Thickness=[90, 90, 240, 240, 230, 230, 300, 300]
          SWCON=[0.360122, 0.360122, 0.354877, 0.354877, 0.270619, 0.270619, 0.265571, 0.265571]
        CERESSoilTemperature Temperature
        Organic: FOMCNRatio=45
          Thickness  Carbon  SoilCNRatio  FBiom       FInert    FOM
          200        0.93    10           0.04        0.8       150
          200        0.44    10           0.0327492   0.80804   122.81
          200        0.44    10           0.0268128   0.816161  100.548
          200        0.354   10           0.0219525   0.824364  82.3217
          200        0.19    10           0.0179732   0.832649  67.3993
          200        0       10           0.0147152   0.841017  55.1819
          200        0       10           0.0120478   0.849469  45.1791
          200        0       10           0.00986388  0.858007  36.9895
          200        0       10           0.00807586  0.86663   30.2845
          200        0       10           0.00661196  0.875339  24.7948
        Chemical
          Thickness  NO3N      NH4N       PH
          200        0.5       0.05       5.5
          200        0.495025  0.0495025  5.5
          200        0.490099  0.0490099  5.5
          200        0.485223  0.0485223  6.5
          200        0.480395  0.0480395  6.5
          200        0.475615  0.0475615  6.5
          200        0.470882  0.0470882  6.5
          200        0.466197  0.0466197  6.5
          200        0.461558  0.0461558  6.5
          200        0.456966  0.0456966  6.5
          PH source: Estimated based on local knowledge
        InitialWater: PercentMethod=0; FractionFull=0.45
        Nutrient
        Sample Initial conditions: Thickness=[1800]; NH4=[1]; SWUnits=Volumetric; OCUnits=Total; PHUnits=Water
      Plant WhiteClover
      Plant Oats
      Plant RedClover
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