Simulations: Version=159
  DataStore
  Simulation Operations
    Weather: FileName=basic_wth_1.csv
    Clock: Start=1989-01-01; End=2100-12-31
    Summary
    SoilArbitrator
    Zone Field: Area=1; Slope=0; AspectAngle=0; Altitude=288
      SurfaceOrganicMatter: InitialResidueName=soybean; InitialResidueType=soybean; InitialResidueMass=1000; InitialStandingFraction=0; InitialCPR=0; InitialCNR=27
      Fertiliser
      Irrigation
      Plant Maize
      Plant Soybean
      Plant Wheat
      Report: EventNames=[Clock].DoReport
        VariableNames:
          [Clock].Today
          //==== Crop Variables (annual)
          [Maize].Grain.Wt   as MaizeYield_gm2
          [Soybean].Grain.Wt as SoyYield_gm2
          [Wheat].Grain.Wt   as WheatYield_gm2
          [Maize].Grain.Wt * 10   as MaizeYield_kgha
          [Soybean].Grain.Wt * 10 as SoyYield_kgha
          [Wheat].Grain.Wt * 10   as WheatYield_kgha
          [Maize].Grain.Wt * 0.159/0.85   		as Corn_buac
          [Soybean].Grain.Wt * 0.149/0.87 		as Soy_buac
          [Wheat].Grain.Wt * 4046.86/(60*453.592) as Wheat_buac
          //[Maize].AboveGround.Wt as MaizeBiomass
          //[Soybean].AboveGround.Wt as SoyBiomass
          //[Wheat].AboveGround.Wt as WheatBiomass
          //[Maize].LAI
          //[Soybean].LAI
          //==== Soil Variables
          [Soil].Physical.BD as BulkDensity_gcc
          [UnitConversions].Script.OC_pct[1] as PctSOM_C_20cm
          sum([Soil].Nutrient.TotalC) as TotalC_wp_kgha
          [Soil].Nutrient.TotalC[1] as TotalC_20cm_kgha
          ([Soil].Nutrient.TotalC[1] + ([Soil].Nutrient.TotalC[2]*0.25)) as TotalC_25cm_kgha
          [Soil].Nutrient.TotalC[2] as TotalC_40cm_kgha
          sum([Soil].Nutrient.TotalC)/1000 as TotalC_wp_Mgha
          [Soil].Nutrient.TotalC[1]/1000 as TotalC_20cm_Mgha
          ([Soil].Nutrient.TotalC[1] + ([Soil].Nutrient.TotalC[2]*0.25))/1000 as TotalC_25cm_Mgha
          [Soil].Nutrient.TotalC[2]/1000 as TotalC_40cm_Mgha
          [Soil].Nutrient.Humic.C[1] + [Soil].Nutrient.Microbial.C[1] + [Soil].Nutrient.Inert.C[1] as TotalSOC_20cm_kgha
          ([Soil].Nutrient.Humic.C[1] + [Soil].Nutrient.Microbial.C[1] + [Soil].Nutrient.Inert.C[1])/1000 as TotalSOC_20cm_Mgha
          [Soil].Nutrient.Humic.C[1] + [Soil].Nutrient.Microbial.C[1] + [Soil].Nutrient.Inert.C[1] + (([Soil].Nutrient.Humic.C[2] + [Soil].Nutrient.Microbial.C[2] + [Soil].Nutrient.Inert.C[2]) * 0.25) as TotalSOC_25cm_kgha
          ([Soil].Nutrient.Humic.C[1] + [Soil].Nutrient.Microbial.C[1] + [Soil].Nutrient.Inert.C[1] + (([Soil].Nutrient.Humic.C[2] + [Soil].Nutrient.Microbial.C[2] + [Soil].Nutrient.Inert.C[2]) * 0.25))/1000 as TotalSOC_25cm_Mgha
          sum([Soil].Nutrient.N2Oatm) as N2OEmissions_kgha
          ([Soil].Nutrient.N2Oatm[1] + ([Soil].Nutrient.N2Oatm[2]*0.25)) as N2O_25cm_kgha
          sum([Soil].Nutrient.N2Oatm[1:5]) as N2O_100cm_kgha
          [Soil].Nutrient.N2Oatm as N2O_bylayer_kgha
          [Soil].Water.MM[1] as VolH2O_20cm_SWmm
          [Soil].Water.Volumetric[1] as VolH2O_20cm
          [Soil].Temperature.Value[1] as SoilTemp_20cm_C
          [Soil].Temperature.Value[2] as SoilTemp_40cm_C
          [Soil].Temperature.Value[3] as SoilTemp_60cm_C
          [Soil].Temperature.Value[4] as SoilTemp_80cm_C
          [Soil].Temperature.Value[5] as SoilTemp_100cm_C
          [Soil].Temperature.Value[6] as SoilTemp_120cm_C
          [Soil].Temperature.Value[7] as SoilTemp_140cm_C
          [Soil].Temperature.Value[8] as SoilTemp_160cm_C
          [Soil].Temperature.Value[9] as SoilTemp_180cm_C
          [Soil].Temperature.Value[10] as SoilTemp_200cm_C
          [Soil].Nutrient.Catm  as CO2_bylayer_kgCha // (units kg C per ha per day)
          sum([Soil].Nutrient.Catm) as TotalCO2_kgCha
          //==== Unused
          //sum([UnitConversions].Script.OC_pct[1:2]) * 0.25 + [UnitConversions].Script.OC_pct[3] * 0.5 as OC_40cm
          //[SurfaceOrganicMatter].Wt
          //[SurfaceOrganicMatter].Cover
          //sum([Soil].NO3.kgha) as NO3
          //===== Summed Annually
          //um of sum([Soil].Nutrient.DenitrifiedN) from [Clock].StartOfYear to [Clock].EndOfYear as AnnualDenitrif
          sum of sum([Soil].Nutrient.N2Oatm) from [Clock].StartOfYear to [Clock].EndOfYear as AnnualN2O
          //sum of [Fertiliser].NitrogenApplied from [Clock].StartOfYear to [Clock].EndOfYear as AnnualNfertilizer
          //sum of sum([Soil].Nutrient.MineralisedNSurfaceResidue) from [Clock].StartOfYear to [Clock].EndOfYear as AnnualResidueMineral
          //sum of sum([Soil].Nutrient.MineralisedN) from [Clock].StartOfYear to [Clock].EndOfYear as AnnualSoilMineral
          //sum of sum([Soil].Nutrient.MineralisedN + [Soil].Nutrient.MineralisedNSurfaceResidue) from [Clock].StartOfYear to [Clock].EndOfYear as AnnualSoilNetMineral
          //sum of [Soil].SoilWater.LeachNO3 from [Clock].StartOfYear to [Clock].EndOfYear as AnnualNleaching
          //sum of (-1 * [Maize].Root.NUptake) from [Clock].StartOfYear to [Clock].EndOfYear as AnnualNUptake
          //===== Daily Values
          //sum([Soil].NO3.kgha) as NO3
          //sum([Soil].NH4.kgha) as NH4
          //[SurfaceOrganicMatter].N  as SurfaceN
          //sum([Soil].Nutrient.Microbial.N) as MicrobialN
          //sum([Soil].Nutrient.FOM.N) as FreshOrganicMatterN
          //sum([Soil].Nutrient.Humic.N) as HumicN
          //[Soil].SoilWater.LeachNO3 as NO3Leaching
          //sum([Soil].Nutrient.N2Oatm) as N2OEmissions
          //sum([Soil].Nutrient.DenitrifiedN) as Denitrification
          //sum([Soil].Nutrient.MineralisedN + [Soil].Nutrient.MineralisedNSurfaceResidue) as TotalMineralization
          //sum([Soil].Nutrient.MineralisedN) as SoilMineralization
          //sum([Soil].Nutrient.MineralisedNSurfaceResidue) as SurfaceMineralization
          //diff of sum([Soil].NO3.kgha + [Soil].NH4.kgha + [Soil].Urea.kgha) from [Clock].StartOfSimulation to [Clock].EndOfDay as DeltaSoilMineralN
          //diff of [SurfaceOrganicMatter].N from [Clock].StartOfSimulation to [Clock].EndOfDay as DeltaSurfaceOMN
          //diff of sum([Soil].Nutrient.Humic.N + [Soil].Nutrient.Microbial.N + [Soil].Nutrient.FOM.N) from [Clock].StartOfSimulation to [Clock].EndOfDay as DeltaSoilOMN
          //-1 * [Maize].Root.NUptake as CropNUptake
          //[Maize].Grain.Wt as CropYield
          //[Maize].AboveGround.Wt as CropBiomass
          //[Maize].LAI as LAI
          //===== Daily Values for C pools (units Kg C per ha)
          //sum([Soil].Nutrient.FOMCarbohydrate.C)
          //sum([Soil].Nutrient.FOMCellulose.C)
          //sum([Soil].Nutrient.FOMLignin.C)
          //sum([Soil].Nutrient.Humic.C)
          //sum([Soil].Nutrient.Microbial.C)
          //sum([Soil].Nutrient.Inert.C)
          //[SurfaceOrganicMatter].C
          [Soil].Nutrient.FOMCarbohydrate.C[1] as FOMCarb_20cm_kgha
          [Soil].Nutrient.FOMCellulose.C[1] as FOMCell_20cm_kgha
          [Soil].Nutrient.FOMLignin.C[1] as FOMLign_20cm_kgha
          [Soil].Nutrient.FOMCarbohydrate.C[1] + ([Soil].Nutrient.FOMCarbohydrate.C[2] * 0.25) as FOMCarb_25cm_kgha
          [Soil].Nutrient.FOMCellulose.C[1] + ([Soil].Nutrient.FOMCellulose.C[2] * 0.25) as FOMCell_25cm_kgha
          [Soil].Nutrient.FOMLignin.C[1] + ([Soil].Nutrient.FOMLignin.C[2] * 0.25) as FOMLign_25cm_kgha
          [Soil].Nutrient.FOMCarbohydrate.Decomposition.Catm[1] as FOMCarb_CO2_20cm_kgha
          [Soil].Nutrient.FOMCellulose.Decomposition.Catm[1] as FOMCell_CO2_20cm_kgha
          [Soil].Nutrient.FOMLignin.Decomposition.Catm[1] as FOMLign_CO2_20cm_kgha
          [Soil].Nutrient.FOMCarbohydrate.Decomposition.Catm[1] + ([Soil].Nutrient.FOMCarbohydrate.Decomposition.Catm[2] * 0.25) as FOMCarb_CO2_25cm_kgha
          [Soil].Nutrient.FOMCellulose.Decomposition.Catm[1] + ([Soil].Nutrient.FOMCellulose.Decomposition.Catm[2] * 0.25) as FOMCell_CO2_25cm_kgha
          [Soil].Nutrient.FOMLignin.Decomposition.Catm[1] + ([Soil].Nutrient.FOMLignin.Decomposition.Catm[2] * 0.25) as FOMLign_CO2_25cm_kgha
          //[Soil].Nutrient.FOM.C[1]
          //[Soil].Nutrient.Humic.C[1]
          //[Soil].Nutrient.Microbial.C[1]
          //[Soil].Nutrient.Inert.C[1]
          //[SurfaceOrganicMatter].C
          //[Soil].Nutrient.FOMCarbohydrate.C[1] + [Soil].Nutrient.FOMCellulose.C[1] + [Soil].Nutrient.FOMLignin.C[1] as FOMC_20cm_kgha
          //([Soil].Nutrient.FOMCarbohydrate.C[1] + [Soil].Nutrient.FOMCellulose.C[1] + [Soil].Nutrient.FOMLignin.C[1])/10 as FOMC_20cm_gm2
          //([Soil].Nutrient.FOMCarbohydrate.C[1] + [Soil].Nutrient.FOMCellulose.C[1] + [Soil].Nutrient.FOMLignin.C[1])/1000 as FOMC_20cm_Mgha
          //[Soil].Nutrient.FOMCarbohydrate.C[1] + [Soil].Nutrient.FOMCellulose.C[1] + [Soil].Nutrient.FOMLignin.C[1] + (([Soil].Nutrient.FOMCarbohydrate.C[2] + [Soil].Nutrient.FOMCellulose.C[2] + [Soil].Nutrient.FOMLignin.C[2]) * 0.25) as FOMC_25cm_kgha
          //([Soil].Nutrient.FOMCarbohydrate.C[1] + [Soil].Nutrient.FOMCellulose.C[1] + [Soil].Nutrient.FOMLignin.C[1] + (([Soil].Nutrient.FOMCarbohydrate.C[2] + [Soil].Nutrient.FOMCellulose.C[2] + [Soil].Nutrient.FOMLignin.C[2]) * 0.25))/10 as FOMC_25cm_gm2
          //([Soil].Nutrient.FOMCarbohydrate.C[1] + [Soil].Nutrient.FOMCellulose.C[1] + [Soil].Nutrient.FOMLignin.C[1] + (([Soil].Nutrient.FOMCarbohydrate.C[2] + [Soil].Nutrient.FOMCellulose.C[2] + [Soil].Nutrient.FOMLignin.C[2]) * 0.25))/1000 as FOMC_25cm_Mgha
          //[Soil].Nutrient.FOMCarbohydrate.Decomposition.Catm[1] + [Soil].Nutrient.FOMCellulose.Decomposition.Catm[1] + [Soil].Nutrient.FOMLignin.Decomposition.Catm[1] as CO2_20cm_kgha
          //[Soil].Nutrient.FOMCarbohydrate.Decomposition.Catm[1] + [Soil].Nutrient.FOMCellulose.Decomposition.Catm[1] + [Soil].Nutrient.FOMLignin.Decomposition.Catm[1] + (([Soil].Nutrient.FOMCarbohydrate.Decomposition.Catm[2] + [Soil].Nutrient.FOMCellulose.Decomposition.Catm[2] + [Soil].Nutrient.FOMLignin.Decomposition.Catm[2]) * 0.25) as CO2_25cm_kgha
          //===== Daily Values for C fluxes (units kg C per ha per day)
          //sum([Soil].Nutrient.FOMCarbohydrate.Decomposition.Catm)
          //sum([Soil].Nutrient.FOMCellulose.Decomposition.Catm)
          //sum([Soil].Nutrient.FOMLignin.Decomposition.Catm)
          //sum([Soil].Nutrient.Microbial.Decomposition.Catm)
          //sum([Soil].Nutrient.Humic.Decomposition.Catm)
          //[Soil].Nutrient.SurfaceResidue.Decomposition.Catm[1]
          //sum([Soil].Nutrient.Catm)
          //===== Long term SOM whole profile
          //sum([Soil].Nutrient.TotalC)
          //sum([Soil].Nutrient.Humic.C) + sum([Soil].Nutrient.Microbial.C) + sum([Soil].Nutrient.Inert.C) as TotalSOM_C
          //sum([Soil].Nutrient.FOMCarbohydrate.C) + sum([Soil].Nutrient.FOMCellulose.C) + sum([Soil].Nutrient.FOMLignin.C) as TotalFOM_C
          //===== Long term SOM by layer and %
          //[Soil].Nutrient.TotalC
          //[UnitConversions].Script.OC_pct
      MicroClimate: a_interception=0; b_interception=1; c_interception=0; d_interception=0; SoilHeatFluxFraction=0.38; MinimumHeightDiffForNewLayer=0; NightInterceptionFraction=0.5; ReferenceHeight=2
      Operations
        1989-04-21  [SurfaceOrganicMatter].Incorporate(fraction: 0.75, depth: 110)
        1989-05-01  [SurfaceOrganicMatter].Incorporate(fraction: 0.5, depth: 30)
        1989-05-01  [SurfaceOrganicMatter].Incorporate(fraction: 0.1, depth: 5)
        1989-05-04  [Maize].Sow(cultivar: B_100, population: 6, depth: 50, rowSpacing: 762)
        1989-06-26  [Fertiliser].Apply(Amount: 124, Type: NO3N)
        1989-10-23  [Maize].Harvest
        1989-10-23  [Maize].EndCrop
        1990-05-25  [SurfaceOrganicMatter].Incorporate(fraction: 0.1, depth: 5)
        1990-05-25  [SurfaceOrganicMatter].Incorporate(fraction: 0.5, depth: 30)
        1990-05-25  [SurfaceOrganicMatter].Incorporate(fraction: 0.75, depth: 110)
        1990-05-25  [SurfaceOrganicMatter].Incorporate(fraction: 0.1, depth: 5)
        1990-05-29  [Soybean].Sow(cultivar: Generic_MG2, population: 47, depth: 50, rowSpacing: 762)
        1990-10-17  [Soybean].Harvest
        1990-10-17  [Soybean].EndCrop
        1991-04-25  [SurfaceOrganicMatter].Incorporate(fraction: 0.75, depth: 110)
        1991-05-02  [SurfaceOrganicMatter].Incorporate(fraction: 0.5, depth: 30)
        1991-05-02  [SurfaceOrganicMatter].Incorporate(fraction: 0.1, depth: 5)
        1991-06-15  [Fertiliser].Apply(Amount: 124, Type: NO3N)
        1991-06-15  [Maize].Sow(cultivar: B_100, population: 6, depth: 50, rowSpacing: 762)
        1991-10-10  [Maize].Harvest
        1991-10-10  [Maize].EndCrop
        1992-05-15  [SurfaceOrganicMatter].Incorporate(fraction: 0.5, depth: 30)
        1992-05-15  [SurfaceOrganicMatter].Incorporate(fraction: 0.75, depth: 110)
        1992-05-18  [Soybean].Sow(cultivar: Generic_MG2, population: 47, depth: 50, rowSpacing: 762)
        1992-05-18  [SurfaceOrganicMatter].Incorporate(fraction: 0.1, depth: 5)
        1992-10-26  [Soybean].Harvest
        1992-10-26  [Soybean].EndCrop
        1993-04-28  [SurfaceOrganicMatter].Incorporate(fraction: 0.75, depth: 110)
        1993-05-06  [SurfaceOrganicMatter].Incorporate(fraction: 0.5, depth: 30)
        1993-05-07  [Maize].Sow(cultivar: B_100, population: 6, depth: 50, rowSpacing: 762)
        1993-05-07  [SurfaceOrganicMatter].Incorporate(fraction: 0.1, depth: 5)
        1993-07-01  [Fertiliser].Apply(Amount: 84, Type: NO3N)
        1993-10-13  [SurfaceOrganicMatter].Incorporate(fraction: 0.1, depth: 5)
        1993-11-08  [Maize].Harvest
        1993-11-08  [Maize].EndCrop
        1993-11-22  [SurfaceOrganicMatter].Incorporate(fraction: .9, depth: 0)
        1994-05-04  [SurfaceOrganicMatter].Incorporate(fraction: 0.75, depth: 110)
        1994-05-13  [SurfaceOrganicMatter].Incorporate(fraction: 0.5, depth: 30)
        1994-05-16  [SurfaceOrganicMatter].Incorporate(fraction: 0.1, depth: 5)
        1994-05-16  [SurfaceOrganicMatter].Incorporate(fraction: 0.1, depth: 5)
        1994-05-18  [Soybean].Sow(cultivar: Generic_MG2, population: 49, depth: 50, rowSpacing: 762)
        1994-06-07  [SurfaceOrganicMatter].Incorporate(fraction: 0.5, depth: 30)
        1994-10-07  [Soybean].Harvest
        1994-10-07  [Soybean].EndCrop
        1994-10-12  [SurfaceOrganicMatter].Incorporate(fraction: 0.5, depth: 30)
        1994-10-13  [Wheat].Sow(cultivar: Yecora, population: 445, depth: 50, rowSpacing: 178)
        1995-04-17  [Fertiliser].Apply(Amount: 56, Type: NO3N)
        1995-08-07  [SurfaceOrganicMatter].Incorporate(fraction: .9, depth: 0)
        1996-04-18  [SurfaceOrganicMatter].Incorporate(fraction: 0.75, depth: 110)
        1996-05-06  [SurfaceOrganicMatter].Incorporate(fraction: 0.5, depth: 30)
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        1996-05-14  [Fertiliser].Apply(Amount: 27, Type: NO3N)
        1996-05-14  [Fertiliser].Apply(Amount: 28, Type: NO3N)
        1996-06-27  [Fertiliser].Apply(Amount: 134, Type: NO3N)
        1997-04-09  [Fertiliser].Apply(Amount: 0, Type: CalciteCA)
        1997-04-10  [Fertiliser].Apply(Amount: 45, Type: RockP)
        2000-05-25  [Soybean].Sow(cultivar: Generic_MG2, population: 52, depth: 50, rowSpacing: 762)
        2000-10-30  [Wheat].Sow(cultivar: Yecora, population: 466, depth: 50, rowSpacing: 178)
        2001-04-05  [Fertiliser].Apply(Amount: 40, Type: NO3N)
        2001-08-24  [Fertiliser].Apply(Amount: 3, Type: NO3N)
        2002-05-10  [Fertiliser].Apply(Amount: 11, Type: RockP)
        2002-05-10  [Maize].Sow(cultivar: B_100, population: 7, depth: 50, rowSpacing: 762)
        2003-04-26  [Fertiliser].Apply(Amount: 7, Type: NO3N)
        2003-04-26  [Fertiliser].Apply(Amount: 14, Type: RockP)
        2003-05-28  [Soybean].Sow(cultivar: Generic_MG2, population: 44, depth: 50, rowSpacing: 762)
        2003-10-08  [Fertiliser].Apply(Amount: 36, Type: NO3N)
        2003-10-08  [Fertiliser].Apply(Amount: 16, Type: RockP)
        2003-10-10  [Wheat].Sow(cultivar: Yecora, population: 494, depth: 50, rowSpacing: 178)
        2004-04-16  [Fertiliser].Apply(Amount: 54, Type: NO3N)
        2005-05-04  [Fertiliser].Apply(Amount: 33, Type: NO3N)
        2005-05-04  [Fertiliser].Apply(Amount: 13, Type: RockP)
        2007-03-30  [Fertiliser].Apply(Amount: 32, Type: NO3N)
        2007-09-22  [Fertiliser].Apply(Amount: 1, Type: NO3N)
        2008-06-19  [Fertiliser].Apply(Amount: 114, Type: NO3N)
        2009-11-06  [Wheat].Sow(cultivar: Yecora, population: 477, depth: 50, rowSpacing: 178)
        2010-04-21  [Fertiliser].Apply(Amount: 50, Type: NO3N)
        2010-04-29  [Fertiliser].Apply(Amount: 37, Type: NO3N)
        2011-05-09  [Maize].Sow(cultivar: B_100, population: 8, depth: 50, rowSpacing: 762)
        2012-04-19  [Fertiliser].Apply(Amount: 8, Type: NO3N)
        2012-04-19  [Fertiliser].Apply(Amount: 17, Type: RockP)
        2013-05-02  [Fertiliser].Apply(Amount: 91, Type: NO3N)
        2015-04-14  [Fertiliser].Apply(Amount: 10, Type: NO3N)
        2015-04-14  [Fertiliser].Apply(Amount: 26, Type: RockP)
        2015-10-06  [Wheat].Sow(cultivar: Yecora, population: 371, depth: 50, rowSpacing: 178)
        2016-03-21  [Fertiliser].Apply(Amount: 34, Type: NO3N)
        2016-04-05  [Fertiliser].Apply(Amount: 24, Type: NO3N)
        2016-04-05  [Fertiliser].Apply(Amount: 50, Type: RockP)
        2016-04-24  [Fertiliser].Apply(Amount: 9, Type: NO3N)
        2016-04-24  [Fertiliser].Apply(Amount: 8, Type: RockP)
        2016-07-12  [Wheat].Harvest
        2016-07-12  [Wheat].EndCrop
        2017-06-21  [Fertiliser].Apply(Amount: 138, Type: NO3N)
        2018-05-27  [Soybean].Sow(cultivar: Generic_MG2, population: 35, depth: 50, rowSpacing: 762)
        2018-10-19  [Wheat].Sow(cultivar: Yecora, population: 485, depth: 50, rowSpacing: 178)
        2020-05-13  [Fertiliser].Apply(Amount: 34, Type: RockP)
        2020-06-24  [Fertiliser].Apply(Amount: 79, Type: NO3N)
        2021-05-10  [Fertiliser].Apply(Amount: 11, Type: NO3N)
        2021-05-10  [Fertiliser].Apply(Amount: 28, Type: RockP)
        2021-05-14  [Soybean].Sow(cultivar: Generic_MG2, population: 37, depth: 50, rowSpacing: 762)
        2021-11-09  [Wheat].Sow(cultivar: Yecora, population: 519, depth: 50, rowSpacing: 178)
        2022-03-22  [Fertiliser].Apply(Amount: 67, Type: NO3N)
        2022-05-05  [Fertiliser].Apply(Amount: 60, Type: NO3N)
        2022-05-10  [Fertiliser].Apply(Amount: 17, Type: NO3N)
        2022-05-10  [Fertiliser].Apply(Amount: 44, Type: RockP)
      Manager UnitConversions
```csharp
using System;
using System.Linq;
using Models.Core;
using Models.Interfaces;
using Models.PMF;
using Models.Soils;
using Models.Soils.Nutrients;
using APSIM.Shared.Utilities;

namespace Models
{
    [Serializable]
    public class Script : Model
    {
    	// Has BD and Thickness, which we need.
    	[Link] IPhysical Physical;
    	[Link] Nutrient Nutrient;
    	
    	[Description("kg/ha to parts per million converison factor")]
    	public double[] kgha2ppm
    	{
    		get => 
    			Physical.BD
    				// Combine bd and thickness.
    				.Zip(Physical.Thickness,
    				     // Produce a single conversion factor.
    				     (bd, th) => 100 / (bd * th))
    				.ToArray();
    	}
    	
    	[Description("Total organic carbon (percent)")]
    	public double[] OC_pct
    	{
    		get 
    		{
    			// Converts from a PPM value to percent value (0-100)
    			var ppm2pct = 100 / 1000000.0;
    			var res =
    				// Organic C is the sum of all pools (per layer, in kg/ha)
    				// Does not include surface residue. Does include Inert and FOM pools.
    				Nutrient.Organic.C
    					// Combines the above values with the kgha->ppm conversion factor...
    					.Zip(kgha2ppm,
    					     // ... and produces a single value in the end.
    					     (oc, factor) => oc * factor * ppm2pct)
    					// Returns an array so the Report can work with it easily.
    					.ToArray();

    			return res;
    		}
    	}
    }
}
```
      Soil Kalamazoo:187069: SoilType=Kalamazoo:187069; State=MI; Country=USA; ApsoilNumber=0; Latitude=42.41; Longitude=-85.372
        DataSource=SSURGO (https://sdmdataaccess.nrcs.usda.gov/) through R package soilDB, R package apsimx function ssurgo2sp. Timestamp 2022-08-31 16:30:58
        Comments=cokey = 21325733 - acres percent = 95 - component percent = 95 - taxonomic classification name = Fine-loamy, mixed, active, mesic Typic Hapludalfs - drainage class = Well drained - elevation = 275 - slope = 3 - geomdesc = Head Slope, Interfluve, Nose Slope, Side Slope
        Physical
          Thickness  ParticleSizeClay  ParticleSizeSand  ParticleSizeSilt  BD     AirDry  LL15   DUL    SAT    KS
          200        19                43                38                1.49   0.034   0.068  0.26   0.438  86.4
          200        19                43                38                1.49   0.034   0.068  0.26   0.438  86.4
          200        19                43                38                1.49   0.034   0.068  0.26   0.438  86.4
          200        23                51                26                1.609  0.138   0.138  0.246  0.393  47.52
          200        12                71                17                1.629  0.069   0.069  0.142  0.385  475.2
          200        5                 87                8                 1.575  0.023   0.023  0.069  0.406  4752
          200        5                 87                8                 1.575  0.023   0.023  0.069  0.406  4752
          200        5                 87                8                 1.575  0.023   0.023  0.069  0.406  4752
          200        1                 95                4                 1.517  0.023   0.023  0.033  0.428  4752
          200        1                 95                4                 1.517  0.023   0.023  0.033  0.428  4752
          SoilCrop MaizeSoil
            LL=[0.068, 0.068, 0.068, 0.138, 0.069, 0.023, 0.023, 0.023, 0.023, 0.023]
            KL=[0.06, 0.049, 0.04, 0.033, 0.027, 0.022, 0.018, 0.015, 0.012, 0.01]
            XF=[1, 1, 1, 1, 1, 1, 1, 1, 1, 1]
            LL source: Estimated based on local knowledge
          SoilCrop SoybeanSoil: same as Operations.Field.Kalamazoo:187069.Physical.MaizeSoil
          SoilCrop WheatSoil
            LL=[0.068, 0.068, 0.068, 0.138, 0.069, 0.023, 0.023, 0.023, 0.023, 0.023]
            KL=[0.06, 0.049, 0.04, 0.033, 0.027, 0.022, 0.018, 0.015, 0.012, 0.01]
            XF=[1, 1, 1, 1, 1, 1, 1, 1, 1, 1]
        WaterBalance SoilWater: SummerDate=1-jun; SummerU=8.55; SummerCona=3.775; WinterDate=1-nov; WinterU=8.55; WinterCona=3.775; DiffusConst=40; DiffusSlope=16; Salb=0.1; CN2Bare=76; CNRed=20; CNCov=0.8; PSIDul=-100; Thickness=[90, 90, 240, 240, 230, 230, 300, 300]
          SWCON=[0.360122, 0.360122, 0.354877, 0.354877, 0.270619, 0.270619, 0.265571, 0.265571]
        CERESSoilTemperature Temperature
        Organic: FOMCNRatio=45; CarbonUnits=Total
          Thickness  Carbon  SoilCNRatio  FBiom       FInert    FOM
          200        0.87    10           0.04        0.8       150
          200        0.43    10           0.0327492   0.80804   122.81
          200        0.43    10           0.0268128   0.816161  100.548
          200        0.233   10           0.0219525   0.824364  82.3217
          200        0.19    10           0.0179732   0.832649  67.3993
          200        0       10           0.0147152   0.841017  55.1819
          200        0       10           0.0120478   0.849469  45.1791
          200        0       10           0.00986388  0.858007  36.9895
          200        0       10           0.00807586  0.86663   30.2845
          200        0       10           0.00661196  0.875339  24.7948
        Chemical: Thickness=[200, 200, 200, 200, 200, 200, 200, 200, 200, 200]; PH=[5.5, 5.5, 5.5, 6.5, 6.5, 6.5, 6.5, 6.5, 6.5, 6.5]; PHUnits=Water
          PH source: Estimated based on local knowledge
        Water: Thickness=[200, 200, 200, 200, 200, 200, 200, 200, 200, 200]; RelativeTo=LL15; FilledFromTop=true
          InitialValues=[0.26, 0.26, 0.096, 0.138, 0.069, 0.023, 0.023, 0.023, 0.023, 0.023]
        Nutrient
        Solute NO3: Thickness=[200, 200, 200, 200, 200, 200, 200, 200, 200, 200]; InitialValuesUnits=ppm; WaterTableConcentration=0; D0=0; DepthConstant=0; MaxDepthSoluteAccessible=0; RunoffEffectivenessAtMovingSolute=0; MaxEffectiveRunoff=0
          InitialValues=[0.5, 0.495025, 0.490099, 0.485223, 0.480395, 0.475615, 0.470882, 0.466197, 0.461558, 0.456966]
        Solute NH4: Thickness=[200, 200, 200, 200, 200, 200, 200, 200, 200, 200]; InitialValuesUnits=ppm; WaterTableConcentration=0; D0=0; DepthConstant=0; MaxDepthSoluteAccessible=0; RunoffEffectivenessAtMovingSolute=0; MaxEffectiveRunoff=0
          InitialValues=[0.05, 0.0495025, 0.0490099, 0.0485223, 0.0480395, 0.0475615, 0.0470882, 0.0466197, 0.0461558, 0.0456966]
        Solute Urea: Thickness=[200, 200, 200, 200, 200, 200, 200, 200, 200, 200]; InitialValues=[0, 0, 0, 0, 0, 0, 0, 0, 0, 0]; InitialValuesUnits=kg/ha; WaterTableConcentration=0; D0=0; DepthConstant=0; MaxDepthSoluteAccessible=0; RunoffEffectivenessAtMovingSolute=0; MaxEffectiveRunoff=0
      Soil Synthetic Soil Derived from ISRIC SoilGrids: ASCOrder=NA; ASCSubOrder=NA; SoilType=Haplic Luvisols; Site=NA; NearestTown=NA; Region=NA; State=NA; Country=United States of America; NaturalVegetation=NA; ApsoilNumber=9999; Latitude=33.625; Longitude=-101.875; LocationAccuracy=+- 250 m; YearOfSampling=2019; DataSource=ISRIC SoilGrids
        Water: Thickness=[150, 150, 150, 150, 200, 200, 200, 200, 300, 300]; FilledFromTop=true
          InitialValues=[0.183, 0.19, 0.193, 0.198, 0.198, 0.193, 0.19, 0.19, 0.19, 0.19]
        Physical
          Thickness  ParticleSizeClay  ParticleSizeSand  ParticleSizeSilt  BD     AirDry  LL15   DUL    SAT    KS
          150        23.3              53                23.7              1.529  0.061   0.183  0.287  0.395  23.448
          150        25                51.5              23.5              1.585  0.063   0.19   0.282  0.375  19.326
          150        26.5              49.8              23.8              1.605  0.064   0.193  0.281  0.372  16.24
          150        27.5              49.2              23.2              1.606  0.066   0.198  0.286  0.378  14.461
          200        27.8              49                23.2              1.611  0.066   0.198  0.286  0.378  14.048
          200        27.3              49                23.8              1.618  0.064   0.193  0.281  0.372  14.887
          200        27                48.8              24.3              1.621  0.063   0.19   0.28   0.37   15.325
          200        27                48.4              24.9              1.618  0.063   0.19   0.282  0.37   15.325
          300        27                47.9              25.7              1.615  0.063   0.19   0.284  0.37   15.325
          300        27                47.3              26.6              1.611  0.063   0.19   0.287  0.37   15.325
          SoilCrop RiceSoil
            LL=[0.183, 0.19, 0.195, 0.211, 0.224, 0.235, 0.249, 0.267, 0.283, 0.287]
            KL=[0.06, 0.06, 0.058, 0.051, 0.042, 0.031, 0.021, 0.01, 0.001, 0]
            XF=[0.986, 0.839, 0.781, 0.772, 0.76, 0.743, 0.738, 0.745, 0.753, 0]
          SoilCrop WheatSoil
            LL=[0.183, 0.19, 0.195, 0.211, 0.224, 0.235, 0.249, 0.267, 0.283, 0.287]
            KL=[0.06, 0.06, 0.058, 0.051, 0.042, 0.031, 0.021, 0.01, 0.001, 0]
            XF=[0.986, 0.839, 0.781, 0.772, 0.76, 0.743, 0.738, 0.745, 0.753, 0]
          SoilCrop TeffSoil
            LL=[0.183, 0.19, 0.195, 0.211, 0.224, 0.235, 0.249, 0.267, 0.283, 0.287]
            KL=[0.06, 0.06, 0.058, 0.051, 0.042, 0.031, 0.021, 0.01, 0.001, 0]
            XF=[0.986, 0.839, 0.781, 0.772, 0.76, 0.743, 0.738, 0.745, 0.753, 0]
          SoilCrop SugarcaneSoil
            LL=[0.183, 0.19, 0.194, 0.205, 0.213, 0.217, 0.224, 0.234, 0.247, 0.264]
            KL=[0.06, 0.06, 0.059, 0.055, 0.05, 0.043, 0.037, 0.031, 0.023, 0.014]
            XF=[0.986, 0.839, 0.781, 0.772, 0.76, 0.743, 0.738, 0.745, 0.753, 0.763]
          SoilCrop MaizeSoil
            LL=[0.183, 0.19, 0.195, 0.211, 0.224, 0.235, 0.249, 0.267, 0.283, 0.287]
            KL=[0.06, 0.06, 0.058, 0.051, 0.042, 0.031, 0.021, 0.01, 0.001, 0]
            XF=[0.986, 0.839, 0.781, 0.772, 0.76, 0.743, 0.738, 0.745, 0.753, 0]
          SoilCrop SoybeanSoil
            LL=[0.183, 0.19, 0.195, 0.211, 0.224, 0.235, 0.249, 0.267, 0.283, 0.287]
            KL=[0.06, 0.06, 0.058, 0.051, 0.042, 0.031, 0.021, 0.01, 0.001, 0]
            XF=[0.986, 0.839, 0.781, 0.772, 0.76, 0.743, 0.738, 0.745, 0.753, 0]
          SoilCrop OilPalmSoil
            LL=[0.183, 0.19, 0.194, 0.205, 0.213, 0.217, 0.224, 0.234, 0.247, 0.264]
            KL=[0.06, 0.06, 0.059, 0.055, 0.05, 0.043, 0.037, 0.031, 0.023, 0.014]
            XF=[0.986, 0.839, 0.781, 0.772, 0.76, 0.743, 0.738, 0.745, 0.753, 0.763]
          SoilCrop CassavaSoil
            LL=[0.183, 0.19, 0.195, 0.211, 0.224, 0.235, 0.249, 0.267, 0.283, 0.287]
            KL=[0.06, 0.06, 0.058, 0.051, 0.042, 0.031, 0.021, 0.01, 0.001, 0]
            XF=[0.986, 0.839, 0.781, 0.772, 0.76, 0.743, 0.738, 0.745, 0.753, 0]
          SoilCrop PlantainForageSoil
            LL=[0.183, 0.19, 0.194, 0.205, 0.213, 0.217, 0.224, 0.234, 0.247, 0.264]
            KL=[0.06, 0.06, 0.059, 0.055, 0.05, 0.043, 0.037, 0.031, 0.023, 0.014]
            XF=[0.986, 0.839, 0.781, 0.772, 0.76, 0.743, 0.738, 0.745, 0.753, 0.763]
          SoilCrop SunflowerSoil
            LL=[0.184, 0.198, 0.21, 0.225, 0.237, 0.246, 0.258, 0.274, 0.284, 0.287]
            KL=[0.099, 0.092, 0.081, 0.069, 0.056, 0.04, 0.024, 0.009, 0, 0]
            XF=[0.986, 0.839, 0.781, 0.772, 0.76, 0.743, 0.738, 0.745, 0.753, 0]
          SoilCrop CanolaSoil
            LL=[0.183, 0.19, 0.195, 0.211, 0.224, 0.235, 0.249, 0.267, 0.283, 0.287]
            KL=[0.06, 0.06, 0.058, 0.051, 0.042, 0.031, 0.021, 0.01, 0.001, 0]
            XF=[0.986, 0.839, 0.781, 0.772, 0.76, 0.743, 0.738, 0.745, 0.753, 0]
          SoilCrop SorghumSoil
            LL=[0.183, 0.19, 0.194, 0.207, 0.217, 0.224, 0.234, 0.247, 0.265, 0.284]
            KL=[0.07, 0.07, 0.069, 0.062, 0.054, 0.045, 0.036, 0.026, 0.014, 0.002]
            XF=[0.986, 0.839, 0.781, 0.772, 0.76, 0.743, 0.738, 0.745, 0.753, 0.763]
          SoilCrop MilletSoil
            LL=[0.183, 0.19, 0.194, 0.207, 0.217, 0.224, 0.234, 0.247, 0.265, 0.284]
            KL=[0.07, 0.07, 0.069, 0.062, 0.054, 0.045, 0.036, 0.026, 0.014, 0.002]
            XF=[0.986, 0.839, 0.781, 0.772, 0.76, 0.743, 0.738, 0.745, 0.753, 0.763]
          SoilCrop PeanutSoil
            LL=[0.183, 0.19, 0.193, 0.2, 0.216, 0.231, 0.249, 0.27, 0.284, 0.287]
            KL=[0.06, 0.06, 0.06, 0.058, 0.048, 0.034, 0.021, 0.007, 0, 0]
            XF=[0.986, 0.839, 0.781, 0.772, 0.76, 0.743, 0.738, 0.745, 0.753, 0]
          SoilCrop BarleySoil
            LL=[0.183, 0.19, 0.195, 0.209, 0.221, 0.23, 0.242, 0.258, 0.277, 0.287]
            KL=[0.07, 0.07, 0.068, 0.061, 0.052, 0.041, 0.029, 0.018, 0.005, 0]
            XF=[0.986, 0.839, 0.781, 0.772, 0.76, 0.743, 0.738, 0.745, 0.753, 0]
          SoilCrop CottonSoil
            LL=[0.183, 0.19, 0.193, 0.198, 0.201, 0.208, 0.219, 0.233, 0.252, 0.275]
            KL=[0.1, 0.1, 0.1, 0.1, 0.097, 0.082, 0.067, 0.053, 0.034, 0.012]
            XF=[0.986, 0.839, 0.781, 0.772, 0.76, 0.743, 0.738, 0.745, 0.753, 0.763]
          SoilCrop OatsSoil
            LL=[0.183, 0.19, 0.195, 0.211, 0.224, 0.235, 0.249, 0.267, 0.283, 0.287]
            KL=[0.06, 0.06, 0.058, 0.051, 0.042, 0.031, 0.021, 0.01, 0.001, 0]
            XF=[0.986, 0.839, 0.781, 0.772, 0.76, 0.743, 0.738, 0.745, 0.753, 0]
          SoilCrop ChickpeaSoil
            LL=[0.183, 0.19, 0.193, 0.2, 0.215, 0.228, 0.244, 0.264, 0.283, 0.287]
            KL=[0.06, 0.06, 0.06, 0.058, 0.049, 0.036, 0.024, 0.011, 0.001, 0]
            XF=[0.986, 0.839, 0.781, 0.772, 0.76, 0.743, 0.738, 0.745, 0.753, 0]
          SoilCrop MungbeanSoil
            LL=[0.183, 0.19, 0.193, 0.208, 0.228, 0.247, 0.269, 0.282, 0.284, 0.287]
            KL=[0.06, 0.06, 0.06, 0.053, 0.039, 0.023, 0.007, 0, 0, 0]
            XF=[0.986, 0.839, 0.781, 0.772, 0.76, 0.743, 0.738, 0, 0, 0]
          SoilCrop Pigeon PeaSoil
            LL=[0.183, 0.19, 0.193, 0.2, 0.216, 0.231, 0.249, 0.27, 0.284, 0.287]
            KL=[0.06, 0.06, 0.06, 0.058, 0.048, 0.034, 0.021, 0.007, 0, 0]
            XF=[0.986, 0.839, 0.781, 0.772, 0.76, 0.743, 0.738, 0.745, 0.753, 0]
          SoilCrop CowpeaSoil
            LL=[0.183, 0.19, 0.195, 0.211, 0.224, 0.235, 0.249, 0.267, 0.283, 0.287]
            KL=[0.06, 0.06, 0.058, 0.051, 0.042, 0.031, 0.021, 0.01, 0.001, 0]
            XF=[0.986, 0.839, 0.781, 0.772, 0.76, 0.743, 0.738, 0.745, 0.753, 0]
          SoilCrop FababeanSoil
            LL=[0.183, 0.19, 0.193, 0.198, 0.207, 0.219, 0.234, 0.252, 0.276, 0.287]
            KL=[0.08, 0.08, 0.08, 0.08, 0.071, 0.056, 0.041, 0.025, 0.007, 0]
            XF=[0.986, 0.839, 0.781, 0.772, 0.76, 0.743, 0.738, 0.745, 0.753, 0]
          SoilCrop LucerneSoil
            LL=[0.183, 0.19, 0.193, 0.198, 0.197, 0.192, 0.194, 0.205, 0.219, 0.238]
            KL=[0.1, 0.1, 0.1, 0.1, 0.1, 0.1, 0.096, 0.084, 0.069, 0.051]
            XF=[0.986, 0.839, 0.781, 0.772, 0.76, 0.743, 0.738, 0.745, 0.753, 0.763]
          SoilCrop LupinSoil
            LL=[0.183, 0.19, 0.195, 0.211, 0.224, 0.235, 0.249, 0.267, 0.283, 0.287]
            KL=[0.06, 0.06, 0.058, 0.051, 0.042, 0.031, 0.021, 0.01, 0.001, 0]
            XF=[0.986, 0.839, 0.781, 0.772, 0.76, 0.743, 0.738, 0.745, 0.753, 0]
          SoilCrop LentilSoil
            LL=[0.183, 0.19, 0.195, 0.211, 0.224, 0.235, 0.249, 0.267, 0.283, 0.287]
            KL=[0.06, 0.06, 0.058, 0.051, 0.042, 0.031, 0.021, 0.01, 0.001, 0]
            XF=[0.986, 0.839, 0.781, 0.772, 0.76, 0.743, 0.738, 0.745, 0.753, 0]
          SoilCrop TriticaleSoil
            LL=[0.183, 0.19, 0.203, 0.223, 0.242, 0.258, 0.276, 0.282, 0.284, 0.287]
            KL=[0.07, 0.07, 0.062, 0.05, 0.035, 0.018, 0.003, 0, 0, 0]
            XF=[0.986, 0.839, 0.781, 0.772, 0.76, 0.743, 0.738, 0, 0, 0]
          SoilCrop EucalyptusSoil
            LL=[0.183, 0.19, 0.193, 0.198, 0.2, 0.196, 0.195, 0.196, 0.198, 0.2]
            KL=[0.08, 0.08, 0.08, 0.079, 0.078, 0.077, 0.076, 0.075, 0.074, 0.072]
            XF=[0.986, 0.839, 0.781, 0.772, 0.76, 0.743, 0.738, 0.745, 0.753, 0.763]
          SoilCrop GliricidiaSoil
            LL=[0.183, 0.19, 0.193, 0.2, 0.202, 0.199, 0.199, 0.202, 0.206, 0.21]
            KL=[0.08, 0.08, 0.08, 0.078, 0.076, 0.074, 0.072, 0.07, 0.067, 0.063]
            XF=[0.986, 0.839, 0.781, 0.772, 0.76, 0.743, 0.738, 0.745, 0.753, 0.763]
        WaterBalance SoilWater: SummerDate=1-may; SummerU=6; SummerCona=6; WinterDate=1-oct; WinterU=2; WinterCona=2; DiffusConst=933.41; DiffusSlope=23.63; Salb=0.13; CN2Bare=73; CNRed=20; CNCov=0; DischargeWidth=5; CatchmentArea=10; PSIDul=-100; Thickness=[150, 150, 150, 150, 200, 200, 200, 200, 300, 300]
          SWCON=[0.427, 0.426, 0.405, 0.389, 0.334, 0.342, 0.348, 0.351, 0.288, 0.293]
        Organic: FOMCNRatio=40; CarbonUnits=Total
          Thickness  Carbon  SoilCNRatio  FBiom  FInert  FOM
          150        0.915   8            0.04   0.482   48.5152
          150        0.675   8            0.031  0.63    38.7402
          150        0.564   8            0.014  0.745   30.9347
          150        0.482   8            0.01   0.87    24.7018
          200        0.393   8            0.01   0.99    18.2996
          200        0.295   8            0.01   0.99    13.5566
          200        0.24    8            0.01   0.99    10.043
          200        0.227   8            0.01   0.99    7.44005
          300        0.21    8            0.01   0.99    4.74398
          300        0.19    8            0.01   0.99    3.0249
        Chemical: Thickness=[150, 150, 150, 150, 200, 200, 200, 200, 300, 300]; PHUnits=Water
          PH=[7.63, 7.75, 7.85, 7.95, 8.03, 8.07, 8.11, 8.13, 8.16, 8.19]
        Nutrient
        CERESSoilTemperature
        Solute NO3: Thickness=[150, 150, 150, 150, 200, 200, 200, 200, 300, 300]; InitialValues=[1, 1, 1, 1, 1, 1, 1, 1, 1, 1]; InitialValuesUnits=ppm; WaterTableConcentration=0; D0=0; DepthConstant=0; MaxDepthSoluteAccessible=0; RunoffEffectivenessAtMovingSolute=0; MaxEffectiveRunoff=0
        Solute NH4: Thickness=[150, 150, 150, 150, 200, 200, 200, 200, 300, 300]; InitialValues=[0.1, 0.1, 0.1, 0.1, 0.1, 0.1, 0.1, 0.1, 0.1, 0.1]; InitialValuesUnits=ppm; WaterTableConcentration=0; D0=0; DepthConstant=0; MaxDepthSoluteAccessible=0; RunoffEffectivenessAtMovingSolute=0; MaxEffectiveRunoff=0
        Solute Urea: Thickness=[150, 150, 150, 150, 200, 200, 200, 200, 300, 300]; InitialValues=[0, 0, 0, 0, 0, 0, 0, 0, 0, 0]; InitialValuesUnits=ppm; WaterTableConcentration=0; D0=0; DepthConstant=0; MaxDepthSoluteAccessible=0; RunoffEffectivenessAtMovingSolute=0; MaxEffectiveRunoff=0
