folder Cotton Simulations: version=37; creator=Apsim 7.10-r4220
  simulation Dryland Cotton and Sorghum-ct
    metfile met: filename=%apsim%\Examples\MetFiles\WeeWaa1889_2012.met
    clock
      start_date = 01/01/2003  # Enter the start date of the simulation
      end_date = 31/12/2100  # Enter the end date of the simulation
    summaryfile
    area paddock
      Soil: SoilType=Kalamazoo:187069; Site=Liberty Research Farm; NearestTown=Lubbock; State=TX; Country=USA; ApsoilNumber=0; Latitude=33.684; Longitude=-101.768; YearOfSampling=0
        DataSource=SSURGO (https://sdmdataaccess.nrcs.usda.gov/) through R package soilDB, R package apsimx function ssurgo2sp. Timestamp 2022-10-02 21:52:50
        Comments=cokey = 22386986 - acres percent = 95 - component percent = 95 - taxonomic classification name = Fine-loamy, mixed, active, mesic Typic Hapludalfs - drainage class = Well drained - elevation = 275 - slope = 3 - geomdesc = Head Slope, Interfluve, Nose Slope, Side Slope
        Water
          Thickness  BD    AirDry  LL15  DUL   SAT
          150        1.31  0.11    0.22  0.43  0.48
          150        1.26  0.176   0.22  0.44  0.49
          300        1.36  0.22    0.22  0.41  0.46
          300        1.39  0.22    0.22  0.4   0.45
          300        1.44  0.22    0.22  0.38  0.43
          300        1.45  0.22    0.22  0.37  0.42
          300        1.46  0.22    0.22  0.37  0.42
          BD, DUL source: Field measured and checked for sensibility
          AirDry, LL15 source: Estimated based on local knowledge
          SAT source: Calculated from measured, estimated or calculated BD
          SoilCrop cotton: LL=[0.22, 0.22, 0.22, 0.25, 0.27, 0.3, 0.33]; KL=[0.1, 0.1, 0.1, 0.1, 0.09, 0.07, 0.05]; XF=[1, 1, 1, 1, 1, 1, 1]
            LL source: Field measured and checked for sensibility
          SoilCrop sorghum: LL=[0.22, 0.22, 0.24, 0.26, 0.28, 0.31, 0.34]; KL=[0.07, 0.07, 0.07, 0.05, 0.05, 0.04, 0.03]; XF=[1, 1, 1, 1, 1, 1, 1]
            LL source: Field measured and checked for sensibility
          SoilCrop ryegrass
        SoilWater: SummerCona=3.5; SummerU=6; SummerDate=1-Nov; WinterCona=2.5; WinterU=4; WinterDate=1-Apr; DiffusConst=40; DiffusSlope=16; Salb=0.12; CN2Bare=73; CNRed=20; CNCov=0.8; Thickness=[150, 150, 300, 300, 300, 300, 300]; SWCON=[0.3, 0.3, 0.3, 0.3, 0.3, 0.3, 0.3]
        SoilOrganicMatter: RootCN=40; RootWt=1000; SoilCN=12; EnrACoeff=7.4; EnrBCoeff=0.2; OCUnits=WalkleyBlack
          Thickness  OC         FBiom  FInert
          150        0.676923   0.04   0.4
          150        0.584615   0.02   0.6
          300        0.476923   0.02   0.8
          300        0.246154   0.02   1
          300        0.0923077  0.01   1
          300        0.0769231  0.01   1
          300        0.0384615  0.01   1
          OC source: Estimated based on local knowledge
        Analysis: Thickness=[150, 150, 300, 300, 300, 300, 300]; PH=[8.9, 9.2, 9.3, 9, 8.8, 7.5, 8.4]; PHUnits=Water; BoronUnits=HotWater
          PH source: Estimated based on local knowledge
        InitialWater: FractionFull=1; PercentMethod=FilledFromTop; RelativeTo=cotton
        Sample InitialNitrogen: NO3Units=kgha; NH4Units=kgha; SWUnits=Volumetric; OCUnits=Total; PHUnits=Water
          Thickness  NO3  NH4
          150        30   1.79994
          150        34   0.29295
          300        28   1.24848
          300        20   1.27602
          300        20   1.37376
          300        10   1.44855
          300        6    1.47168
      surfaceom SurfaceOrganicMatter
        PoolName = cotton  # Organic Matter pool name
        type = cotton  # Organic Matter type
        mass = 1000  # Initial surface residue (kg/ha)
        cnr = 80  # C:N ratio of initial residue
        standing_fraction = 0  # Fraction of residue standing
      fertiliser
      Cotton2 Cotton
        initsection
          crop_type = cotton
          leaf_res_n_conc = 0.02
          hucut = 40  # oC
          baset = 12  # oC
          open_def = 60  # %
          a_root_leaf = 1.01
          a_stem_leaf = 1.25
          e_par = 2.5  # g/MJ
          specific_lw = 58  # g/m^2
          t_opt = 25  # oC
          t_base = 8  # oC
          wt_area_max = 150
          embryo = 0.75  # g
          f_leaf = 0.6
          f_stem = 0.15
          f_root = 0.25
          elevation_default = 200  # m
          wlog_assimilate_red = 0.2
          wlog_carcap_red = 0.2
          watlog_c = 0.87
          watlog_n = 0.87
          wlog_carcap_red_stress = 0.01
          smi_affect_wlog = 0.75
          days_relief_wlog = 7  # days
          frost_kill_immediate = 2  # oC
          rtdep_max = 130  # cm
          harvest_n_frac = 0.85
          cutout_smi_crit = 0.75
          cutout_smi_days = 5  # days
          cutout_smi_site_red = 0.1
          epcoef1 = 3.051
          epcoef2 = 2.436
          epcoef_smi_crit = 0.5
          fbwstr_low = 0
          fbwstr_high = 0.5
          fbwstr_a = 1
          fbnstr_low = 0
          fbnstr_high = 0.5
          fbnstr_a = 1
          relp_smi_crit = 0.5
          relp_intercept = 0.25
          relp_slope = 0.864
          relp_low = 0
          relp_high = 1
          relp_a = 0.5
          vsnstr_low = 0
          vsnstr_high = 0.9
          vsnstr_a = 1
          flfsmi_low = 0
          flfsmi_high = 0.5
          flfsmi_a = 1
          vlnstr_low = 0
          vlnstr_high = 0.9
          vlnstr_a = 1
          fw_low = 0
          fw_high = 0.25
          fw_a = 1
          adjust_low = 0
          adjust_high = 5
          adjust_a = 1
          fwstrs_low = 0
          fwstrs_high = 0.5
          fwstrs_a = 4
          smi_delay_crit = 0.25
          cold_shock_delay_crit = 11  # oC
          cold_shock_delay = 5.2  # dd
          fert_crit = 1  # kg/ha
          fert_detect = 10  # kg/ha
          days_since_fert_max = 100  # days
          cultivar_default = S71BR
          rootLACrit = 0.012  # m2/plant
          RFV_max = 30  # mm/day
          specific_root_length = 60000  # mm/g
          useDDsumTo1stSq = true
          init cultivars: array=T
            element
              cultivar = _Default_S71BR
              percent_l = 40
              scboll = 5
              respcon = 0.01593
              sqcon = 0.0217
              fcutout = 0.5411
              flai = 0.87
              DDISQ = 402
              TIPOUT = 52
              FRUDD = [50, 161, 307, 338, 484, 630, 848, 1071]
              BLTME = [0, 0, 0, 0.07, 0.21, 0.33, 0.55, 1]
              WT = [0.0104, 0.0272, 0.1441, 0.0988, 0.5042, 0.9617, 1, 0.5785]
              dlds_max = 0.12
              rate_emergence = 1
              popcon = 0.03633
              fburr = 1.23
              ACOTYL = 525
              RLAI = 0.01
              BckGndRetn = 0.9
            element
              cultivar = S71
              percent_l = 42
              scboll = 5.2
              respcon = 0.01593
              sqcon = 0.0217
              fcutout = 0.5411
              flai = 0.87
              DDISQ = 402
              TIPOUT = 52
              FRUDD = [50, 161, 307, 338, 484, 630, 848, 1071]
              BLTME = [0, 0, 0, 0.07, 0.21, 0.33, 0.55, 1]
              WT = [0.0104, 0.0272, 0.1441, 0.0988, 0.5042, 0.9617, 1, 0.5785]
              dlds_max = 0.12
              rate_emergence = 1
              popcon = 0.03633
              fburr = 1.23
              ACOTYL = 525
              RLAI = 0.01
              BckGndRetn = 0.8
            element
              cultivar = S71BR
              percent_l = 40
              scboll = 5
              respcon = 0.01593
              sqcon = 0.0217
              fcutout = 0.5411
              flai = 0.87
              DDISQ = 402
              TIPOUT = 52
              FRUDD = [50, 161, 307, 338, 484, 630, 848, 1071]
              BLTME = [0, 0, 0, 0.07, 0.21, 0.33, 0.55, 1]
              WT = [0.0104, 0.0272, 0.1441, 0.0988, 0.5042, 0.9617, 1, 0.5785]
              dlds_max = 0.12
              rate_emergence = 1
              popcon = 0.03633
              fburr = 1.23
              ACOTYL = 525
              RLAI = 0.01
              BckGndRetn = 0.9
            element
              cultivar = Siok
              percent_l = 42
              scboll = 4.5
              respcon = 0.01593
              sqcon = 0.0228
              fcutout = 0.5411
              flai = 0.52
              DDISQ = 420
              TIPOUT = 52
              FRUDD = [50, 180, 350, 380, 520, 660, 870, 1100]
              BLTME = [0, 0, 0, 0.07, 0.21, 0.33, 0.55, 1]
              WT = [0.0104, 0.0272, 0.1441, 0.0988, 0.5042, 0.9617, 1, 0.5785]
              dlds_max = 0.12
              rate_emergence = 1
              popcon = 0.03633
              fburr = 1.23
              ACOTYL = 525
              RLAI = 0.01
              BckGndRetn = 0.9
            element
              cultivar = Sica
              percent_l = 40
              scboll = 5.5
              respcon = 0.02306
              sqcon = 0.0206
              fcutout = 0.4789
              flai = 0.87
              DDISQ = 420
              TIPOUT = 52
              FRUDD = [50, 180, 350, 380, 520, 660, 870, 1100]
              BLTME = [0, 0, 0, 0.07, 0.21, 0.33, 0.55, 1]
              WT = [0.0104, 0.0272, 0.1441, 0.0988, 0.5042, 0.9617, 1, 0.5785]
              dlds_max = 0.12
              rate_emergence = 1
              popcon = 0.03633
              fburr = 1.23
              ACOTYL = 525
              RLAI = 0.01
              BckGndRetn = 0.9
      outputfile: filename=Dryland Cotton and Sorghum-ct.out; title=Dryland Cotton and Sorghum-ct
        variables
          variables: dd/mm/yyyy as Date, dw_total, nuptake_total, yield, bolls_sc, lai_max, esw, InCropRain
        events Reporting Frequency: event=harvesting
      tracker: variable=sum of rain on end_day from sowing to now as InCropRain
      sorghum
      operations Operations Schedule
      folder Manager folder
        manager Harvesting rule
          # Harvesting criteria
          crop = Cotton  # Enter name of crop to harvest when ripe
          on end_of_day:
```
           if ('[crop]' = 'cotton') then

               !!  cotton defoliation
                if ([crop].stageName = 'mature'  and  [crop].defol_das = 0) then
                    [crop] defoliate
                endif
          
                !! cotton harvest
                if ([crop].stageName = 'harvest_ripe' or [crop].PlantStatus = 'dead') then
                   !!report_harvest do_output
                   [crop] harvest
                   [crop] end_crop
                endif

           endif
```
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